// COMSOL Multiphysics 5.3.1.201 model "co2mirza1.mph"
// Outline of the model tree

Selections
  sel1: Explicit "Outline 1" on boundaries 1-4
  sel2: Explicit "h" on boundaries 1-4

Geometry
  geom1 "Geometry 1" (2D, length unit m)
    r1: Rectangle | size = {100, 7}
    fin: Finalize "Form Union"

Materials
  mat2: Common "Sandstone (japan) [solid]" on all domains
    def "Basic"
      thermalconductivity = 0.02630
      density = 2500
      dynamicviscosity = 1
      porosity = 0.089
      hydraulicpermeability = 8.48734e-17
      heatcapacity = 920
      ratioofspecificheat = 1
      k: Piecewise | arg = T; pieces = {293.0, 385.0, 1.241467+0.005733333*T^1}
      rho: Piecewise | arg = T; pieces = {293.0, 303.0, 2600.0}
  mat3: Common "Carbon dioxide" on no domains
    def "Basic"
      dynamicviscosity = eta(T[1/K])[Pa*s]
      ratioofspecificheat = 1.3
      heatcapacity = Cp(T[1/K])[J/(kg*K)]
      density = rho(pA[1/Pa],T[1/K])[kg/m^3]
      thermalconductivity = k(T[1/K])[W/(m*K)]
      eta: Piecewise | arg = T; pieces = {220.0, 600.0, -1.48502597E-6+6.46786388E-8*T^1-3.66170537E-11*T^2+1.24501217E-14*T^3}
      Cp: Piecewise | arg = T; pieces = {220.0, 600.0, 459.913258+1.86487996*T^1-0.00212921519*T^2+1.22488004E-6*T^3}
      rho: Analytic | expr = pA*0.04401/8.314/T; args = {pA, T}; dermethod = manual; argders = {{pA, d(pA*0.04401/8.314/T,pA)}, {T, d(pA*0.04401/8.314/T,T)}}
      k: Piecewise | arg = T; pieces = {220.0, 600.0, -0.00132472616+4.13956923E-5*T^1+6.70889081E-8*T^2-2.11083153E-11*T^3}

Physics
  dl: DarcysLaw on all domains
    dependent variable p
    dlm1: DarcysLawModel "Fluid and Matrix Properties 1" (default)
      FluidMaterial = mat3
      PorousMaterial = mat2
      minput_temperature = 366.483
    nf1: NoFlow (default)
    init1: init "Initial Values 1" (default) | p = 8597762
    inl1: Inlet on boundaries 1 | U0 = 1e-5
    out1: Outlet on boundaries 4 | U0out = 1e-5
  ht: PorousMediaHeat "Heat Transfer in Porous Media" on all domains
    dependent variable T
    porous1: PorousHeatTransferModel "Porous Medium 1" (default)
      Fluid_material = mat3
      theta_p = 0.22
      SolidMaterial = mat2
      minput_pressure = 8597762
      minput_velocity = {1e-5, 0, 0}
    init1: init "Initial Values 1" (default) | Tinit = 366.483
    ins1: ThermalInsulation (default)
    temp1: TemperatureBoundary "Temperature 1" on boundaries 2, 3 | T0 = 366.483
    temp2: TemperatureBoundary "Temperature 2" on boundaries 1 | T0 = 400
    ofl1: ConvectiveOutflow "Outflow 1" on no boundaries
    ofl2: ConvectiveOutflow "Outflow 2" on boundaries 4
  re: ReactionEng "Reaction Engineering"
    EquationForm.form = Transient
    energybalance.T = 48.33[degC]
    mixture.psource = UserDefined
    mixture.p = 1960[psi]
    calcTransport.calcTransport = 1
    calcTransport.dynamicViscositySel = Automatic
    calcTransport.thermalConductivitySel = Automatic
    Activity.useActivity = 1
    UniformScaling.UniformScaling = 1
    massbalance.Vr = 11668.62182[m^3]
    inits1: SpeciesInitialValue "Initial Values 1" | initialValue = {1, 1, 1}
    rch1: ReactionChem "Reaction 1" (disabled)
    CO2: SpeciesChem "Species: CO2" (disabled) | z = 0.867; M = 44.009[g/mol]
    CH4: SpeciesChem "Species: CH4" (disabled) | z = 0.867; M = 16.043[g/mol]
    C2H6: SpeciesChem "Species: C2H6" (disabled) | z = 0.867; M = 30.07[g/mol]
    C3H8: SpeciesChem "Species: C3H8" (disabled) | z = 0.867; M = 44.097[g/mol]
    C4H10: SpeciesChem "Species: C4H10" (disabled) | z = 0.867; M = 58.124[g/mol]
    nC4H10: SpeciesChem "Species: nC4H10" (disabled) | z = 0.867; M = 58.124[g/mol]
    C5H12: SpeciesChem "Species: C5H12" (disabled) | z = 0.867; M = 72.151[g/mol]
    C6H14: SpeciesChem "Species: C6H14" (disabled) | z = 0.867; M = 86.178[g/mol]
    He: SpeciesChem "Species: He" (disabled) | z = 0.867; M = 4.003[g/mol]
    H2: SpeciesChem "Species: H2" (disabled) | z = 0.867; M = 2.016[g/mol]
    N2: SpeciesChem "Species: N2" (disabled) | z = 0.867; M = 28.014[g/mol]
    rch2: ReactionChem "2: NG+Carbondioxide<=>mix" | formula = NG+Carbondioxide<=>mix
    NG: SpeciesChem "Species: NG" | z = 0.852373046449; kgas = 0.050612516031[W/(m*K)]; M = 16.8[g/mol]
    Carbondioxide: SpeciesChem "Species: Carbondioxide"
      z = 0.397169946661
      GasDiffusivitySel = Automatic
      kgas = 0.0382093297055[W/(m*K)]
      M = 44.0097007751465[g/mol]
    mix: SpeciesChem "Species: mix" | z = 0.712283332862; kgas = 0.0471858311812[W/(m*K)]; M = 24.3162200492372[g/mol]

Mesh
  mesh1 "Mesh 1" (physics-controlled)
    size: MeshSizeDefault | hauto = 1

Studies
  std1 "Study 1"
    time: Transient "Time Dependent" | tlist = range(0,0.1,1)

Solver configurations
  sol1 "Solution 1" (study std1)
    v1: Variables "Dependent Variables 1"
    t1: Time "Time-Dependent Solver 1"
      tlist = range(0,0.1,1)
      rtol = 1.0E-5
      atolglobalvaluemethod = manual
      atolglobal = 1.0E-6
      maxorder = 2
      estrat = exclude
      tout = tsteps
      fc1: FullyCoupled | linsolver = d1; dtech = auto; maxiter = 5; damp = 0.9; jtech = once
      d1: Direct

Datasets
  dset1: Solution | solution = sol1

Plots
  pg1: PlotGroup2D "Pressure(dl)" | data = dset1
    surf1: Surface | expr = p
  pg2: PlotGroup2D "Temperature (ht)" | data = dset1
    surf1: Surface | expr = T
  pg3: PlotGroup2D "Isothermal Countors" | data = dset1
    con1: Contour | expr = T
  pg4: PlotGroup2D "Rx(re)" | data = dset1
    surf1: Surface | expr = p
  pg5: PlotGroup1D "Concentration (re)" | data = dset1
    lngr1: LineGraph | expr = re.c0s; descr = Concentration

Exports
  tbl1: Table "Tabel COMSOL" | table = tbl1; filename = D:\TABEL COMSOL 1.xlsx